X := transpose([-0.02, -0.01, 0, 0.01, 0.02])
Y := transpose([-10, -7, 0, 10, 40])
n := rows(X)
n = 5  # кількість точок
m := 3  # порядок полінома
k := 0, 1 .. m
p := 0, 1 .. m  # елементи матриці коефіцієнтів системи лінійних рівнянь
c[k, p] := sum(X[i]^(k + p), i = 0 .. n - 1)
b[k] := sum(Y[i]*X[i]^k, i = 0 .. n - 1)  # елементи матриці правих частин системи
a := c^-1*b  # коефіцієнти полінома
y(x) := sum(a[i]*x^i, i = 0 .. m)
i := 0 .. n - 1
Δ[i] := |Y[i] - y(X[i])|
max(Δ) = 1.54286
x := X[0], X[0] + 0.001 .. X[n - 1]
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a = [-1.54286; 716.667; 40714.3; 1333333]
