# Початкові данні:
X := transpose([1.2, 2.3, 3.8, 4.3, 5.4, 6.3, 7.5, 8.1, 9.6])
Y := transpose([0.01, 0.01, 0.07, 0.15, 0.37, 0.94, 3.57, 6.87, 19.54])
# Визначаємо кількість точок:
n := rows(X) = 9
# Задаємо порядок полінома:
m := 4
# Визначаємо елементи матриці коефіцієнтів системи лінійних рівнянь:
k := 0, 1 .. m
p := 0, 1 .. m
c[k, p] := sum(X[i]^(k + p), i = 0 .. n - 1)
# Визначаємо елементи матриці правих частин системи:
b[k] := sum(Y[i]*X[i]^k, i = 0 .. n - 1)
# Розв'язуємо систему матричним методом і знаходимо коефіцієнти полінома:
a := c^-1*b
# Визначаємо апроксимуючу функцію:
y(x) := sum(a[i]*x^i, i = 0 .. m)
# Визначаємо максимальну похибку апроксимації:
i := 0 .. n - 1
Δ[i] := |Y[i] - y(X[i])|
max(Δ) = 0.282341
x := X[0], X[0] + 0.01 .. X[n - 1]
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