ω_s1 := 16*10^3  # перша границя затримування, рад/c
ω_p1 := 44*10^3  # перша границя пропуску, рад/c
ω_p2 := 0.2*10^6  # друга границя пропуску, рад/c
ω_s2 := 0.55*10^6  # друга границя затримування, рад/c
R_s := 40  # максимальне ослаблення сигналу в смузі пропуску, дБ
R_p := 3  # мінімальне ослаблення сигналу в смузі затримування, дБ
ω_max := π*10^6  # частота найвищої гармоніки вхідного сигналу, рад/c
# Мінімальний порядок ФНЧ:
n_1 := ceil(log((10^(0.1*R_s) - 1)/(10^(0.1*R_p) - 1))/(2*log(ω_s2/ω_p2))) = 5
# Мінімальний порядок ФВЧ:
n_2 := ceil(log((10^(0.1*R_s) - 1)/(10^(0.1*R_p) - 1))/(2*log(ω_p1/ω_s1))) = 5
# Мінімальний порядок СФ:
n := max(n_1, n_2) = 5
# Порядковий номер полюса:
k := 1 .. n
# Аргументи полюсів:
a[k] := π*(2*k - 1)/(2*n)
# Полюси:
P[k] := -sin(a[k]) + 1i*cos(a[k])
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P = [0; -0.309017 + 0.951057i; -0.809017 + 0.587785i; -1; -0.809017 - 0.587785i; -0.309017 - 0.951057i]
# Розташування полюсів на комплексній площині
# Показник парності порядку фільтра (1-парний, 0-непарний):
r :=
    1 if round(n/2) == n/2
    0 otherwise
r = 0
# Дійсні частини полюсів:
P_re[k] := Re(P[k])
transpose(P_re) = [0, -0.309017, -0.809017, -1, -0.809017, -0.309017]
# Квадрати модулей полюсів:
P_sqr[k] := |P[k]|^2
transpose(P_sqr) = [0, 1, 1, 1, 1, 1]
# Коефіцієнт при дробі:
K := -1
# Передавальна функція нормованого фільтра:
W_n(p) := K/((p - P[(n + 1)/2])*product(p^2 - 2*p*Re(P[k]) + |P[k]|^2, k = 1 .. (n - 1)/2))
# Знаменник передавальної функції:
D_n(p) := (p - P[(n + 1)/2])*product(p^2 - 2*p*Re(P[k]) + |P[k]|^2, k = 1 .. (n - 1)/2)
D_n(p) expand, p → p + sqrt(5)*p^2 + sqrt(5)*p^3 + sqrt(5)*p^4 + 3*p^2 + 3*p^3 + p^4 + p^5 + sqrt(5)*p + 1
# Рівняння АЧХ нормованого фільтра:
A_n(ω) := |W_n(1i*ω)|
# Діапазон зміни частоти:
ω := 0.01, 0.02 .. 100
# Графік АЧХ нормованого фільтра:
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# Частота зрізу ФВЧ:
ω_c1 := ω_s1*(10^(0.1*R_s) - 1)^(1/(2*n))
ω_c1 = 40189.8
# Частота зрізу ФНЧ:
ω_c2 := ω_s2*(10^(0.1*R_s) - 1)^(-1/(2*n))
ω_c2 = 218961
# Знаменник передавальної функції ФВЧ:
D_1(p) := p^n*D_n(ω_c1/p)
D_1(p) expand, p → 2.6089307884e18*p + 6.49152775783e13*sqrt(5)*p^2 + 1615218495.56*sqrt(5)*p^3 + 40189.7809842*sqrt(5)*p^4 + 1.94745832735e14*p^2 + 4845655486.68*p^3 + 40189.7809842*p^4 + p^5 + 2.6089307884e18*sqrt(5)*p + 1.04852356989e23
# Коефіцієнти знаменника:
a_1 := transpose([1.04852356989e23, 8.44267737986*10^18, 3.39900806178*10^14, 8.45739384127*10^9, 1.30056863266*10^5, 1])
# Передавальна функція ФВЧ:
W_1(p) := K*p^n/D_1(p)
# Знаменник передавальної функції ФНЧ:
D_2(p) := D_n(p/ω_c2)
D_2(p) expand, p → -2.2835102832e-6*p + 2.2835102832e-6*p + 4.56702056639e-6*p + 4.35042683739e-22*p^4 + (-2.1752134187e-22*p^4) + 2.1752134187e-22*p^4 + 1.19071798948e-16*p^3 + 1.98684888389e-27*p^5 + 4.17153537077e-11*p^2 + (-1.04288384269e-11*p^2) + (-5.21441921346e-12*p^2) + 1.04288384269e-11*p^2 + (-4.76287195793e-17*p^3) + (-2.38143597896e-17*p^3) + 4.76287195793e-17*p^3 + 1.90514878317e-16*p^3 + 2.60720960673e-11*p^2 + (-5.21441921346e-12*sqrt(5)*p^2) + 5.21441921346e-12*sqrt(5)*p^2 + 2.08576768538e-11*sqrt(5)*p^2 + (-2.38143597896e-17*sqrt(5)*p^3) + 2.38143597896e-17*sqrt(5)*p^3 + 9.52574391586e-17*sqrt(5)*p^3 + 4.56702056639e-6*sqrt(5)*p + 4.35042683739e-22*sqrt(5)*p^4 + 1
# Коефіцієнти знаменника:
a_2 := transpose([1, 1.47791890075*10^-5, 1.09212213859*10^-10, 4.98774426797*10^-16, 1.40782769769*10^-21, 1.98684888389e-27])
# Передавальна функція ФНЧ:
W_2(p) := K*1/D_2(p)
# Передавальна функція СФ:
W(p) := W_1(p)*W_2(p)
# АЧХ смугового фільтра:
A(ω) := |W(1i*ω)|
ω := 0.5*ω_s1, 0.5*ω_s1 + 0.01*ω_s1 .. 2*ω_s2
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# Максимальне ослаблення сигналу в смузі пропуску:
-20*log(A(ω_s1)) = 40
R_s = 40
# Мінімальне ослаблення сигналу в смузі затримування:
-20*log(A(ω_p1)) = 1.47439
R_p = 3
# Частота дискретизації, рад/с:
ω_d := 2*ω_max
ω_d = 6283185
# Частота дискретизації, Гц:
f_d := ω_d/(2*π)
f_d = 1000000
# Функція визначення коефіцієнтів бінома Ньютона:
C(i, j) :=
    i!/(j!*(i - j)!) if 0 ≤ j ≤ i
    0 otherwise
k := 0 .. n
# Коефіцієнти знаменника дискретної передавальної функції ФВЧ:
c_1[k] := (2*f_d)^(-n)*sum(a_1[m]*(2*f_d)^m*sum((-1)^(m - h)*C(m, h)*C(n - m, k - h), h = 0 .. k), m = 0 .. n)
transpose(c_1) = [-0.937044, 4.80707, -9.8658, 10.1257, -5.19716, 1.06719]
# Коефіцієнти чисельника дискретної передавальної функції ФВЧ:
d_1[k] := (-1)^(n - k)*C(n, k)
transpose(d_1) = [-1, 5, -10, 10, -5, 1]
# Дискретна передавальна функція ФВЧ:
W_d1(z) := K*sum(d_1[k]*z^k, k = 0 .. n)/sum(c_1[k]*z^k, k = 0 .. n)
# Перевірка:
z_1 := 0.78
z_2 := 1.28
W_d1(z_1) = -1.68943
W_d1(z_2) = -0.58994
W_1(2*f_d*(z_1 - 1)/(z_1 + 1)) = -1.68943
W_1(2*f_d*(z_2 - 1)/(z_2 + 1)) = -0.58994
# Коефіцієнти знаменника дискретної передавальної функції ФНЧ:
c_2[k] := sum(a_2[m]*(2*f_d)^m*sum((-1)^(m - h)*C(m, h)*C(n - m, k - h), h = 0 .. k), m = 0 .. n)
transpose(c_2) = [-44635.8, 254663, -583684, 672057, -388931, 90562]
# Коефіцієнти чисельника дискретної передавальної функції ФНЧ:
d_2[k] := C(n, k)
transpose(d_2) = [1, 5, 10, 10, 5, 1]
# Дискретна передавальна функція ФНЧ:
W_d2(z) := K*sum(d_2[k]*z^k, k = 0 .. n)/sum(c_2[k]*z^k, k = 0 .. n)
# Перевірка:
z_1 := 0.78
z_2 := 1.28
W_d2(z_1) = 10.9844
W_d2(z_2) = -0.0392033
W_2(2*f_d*(z_1 - 1)/(z_1 + 1)) = 10.9844
W_2(2*f_d*(z_2 - 1)/(z_2 + 1)) = -0.0392033
# Похідна від АЧХ за частотою:
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# За графіком визначаємо максимальне за модулем значення похідної від АЧХ за частотою:
max_dA_dω := 5.212828*10^-5
# Максимально припустиме значення вільної складової амплітуди:
Y_f.max := 0.1
# Модулі полюсів нормованого фільтра:
P_re.abs[k] := |P_re[k]|
P_re.abs[0] := 1
min(P_re.abs) = 0.309017
# Швидкість зростання частоти:
v_ω := 0.5*Y_f.max*min(P_re.abs)*ω_c1/max_dA_dω
v_ω = 11912272
# Час моделювання:
t_max := 2*ω_s2/v_ω
t_max = 0.0923417
k_ωi := f_d/v_ω = 0.083947
Y_f.max := 0.5
# Швидкість зростання частоти:
v_ω := 0.5*Y_f.max*min(P_re.abs)*ω_c1/max_dA_dω
v_ω = 59561362
# Час моделювання:
t_max := 3*ω_max/v_ω
t_max = 0.158236
k_ωi := f_d/v_ω = 0.0167894
c_2[0] = -44635.8
d_1[0] = -1
d_2[0] = 1
c_1[0] = -0.937044
d_1[1] = 5
c_2[1] = 254663
d_2[1] = 5
c_1[1] = 4.80707
d_1[2] = -10
c_2[2] = -583684
d_2[2] = 10
c_1[2] = -9.8658
d_1[3] = 10
c_2[3] = 672057
d_2[3] = 10
c_1[3] = 10.1257
d_1[4] = -5
c_2[4] = -388931
d_2[4] = 5
c_1[4] = -5.19716
d_1[5] = 1
c_2[5] = 90562
d_2[5] = 1
c_1[5] = 1.06719
