R_ε := 0.246 + 0.037 + 0.055 = 0.338
L_ε := 4 + 0.505 + 0.4 = 4.905
J_ε := 0.1 + 0.415 = 0.515
M_n := 7500*30/(3.14*1500) = 47.7707
1/0.338 = 2.95858
k_m := 47.771/41.07 = 1.16316
k_ω := 30*(220 - 0.246*41.07)/(3.14*1500) = 1.33692
k_d := 1/1.337 = 0.747943
ε
T_m := J_ε*10^-4*R_ε/(k_m*k_ω) = 1.11938e-5
T_e := L_ε*10^-3/R_ε = 0.0145118
k_d/(T_m*T_e + T_m + 1) = 0.747935
(1.119*10^-5)*0.015 = 1.6785e-7
