Δ_вх := 0.1
Δ_≈ := 0.1
U_вых.min := 20
U_вых := 50
U_вых.max := 70
I_н.min := 0.2
I_н.max := 2
U_вых.≈ := 0.3
N := 0.9
f_п := 8*10^3
γ_max := 0.9
U_ВС.нас := 1.5
U_др := 0.02*U_вых
ΔI := I_н.min
U_вх.min := 1/(1 - Δ_≈)*(U_вых.max/γ_max + U_ВС.нас + U_др) = 89.1975
U_вх := U_вх.min/(1 - Δ_вх) = 99.1084
U_вх.max := U_вх*(1 + Δ_вх) = 109.019
γ_min := (U_вых.min + U_др)/(U_вх.max - U_др - U_ВС.нас) = 0.197148
γ := (U_вых + U_др)/(U_вх - U_др - U_ВС.нас) = 0.527905
γ_max := (U_вых.max + U_др)/(U_вх.min - U_др - U_ВС.нас) = 0.818939
L_min := U_вых.max*(1 - γ_min)/(2*f_п*I_н.min) = 0.0175624
L := U_вых*(1 - γ)/(ΔI*f_п) = 0.014753
L := L_min
C_ф := I_н.max*(1 - γ_min)/(f_п*2*U_вых.≈) = 0.000334522
T_п := 1/f_п = 0.000125
I_С.max := U_вых.min*(1 - γ_min)/(2*L*f_п) = 0.0571429
I_С.д := I_С.max/sqrt(3) = 0.0329914
I_L.min := I_н.max - I_С.max = 1.94286
I_L.ср := I_н.max = 2
I_L.max := I_н.max + I_С.max = 2.05714
ΔI := 2*I_С.max = 0.114286
U_вик := sqrt(L/C_ф)*(I_н.max - I_н.min) = 13.0422
C_GS := 5.1*10^-10
R_ВС.max := 0.36*10^-3
t_від := 30*10^-9
U_ЗВ1 := 12
t_вим := 150*10^-9
U_пр := 0.95
t_вм := 3*10^-8
P_VT1 := C_GS*U_ЗВ1^2/(2*t_вм) = 1.224
I_G := C_GS*U_ЗВ1/t_вм = 0.204
t_вм := (C_GS + U_ЗВ1)/I_G = 58.8235
t_вм := 3*10^-8
P_втр.нас := I_н.max^2*R_ВС.max = 0.00144
P_втр.дин := 0.5*f_п*U_вх.max*(I_L.min*t_вм + I_L.max*t_вим) = 0.159978
P_втр.VT1 := P_втр.дин + P_втр.нас = 0.161418
T_п.max := 150
T_окр.max := 50
P_VD2 := I_н.max*U_пр*(1 - γ_min) + U_вх.max*I_L.ср*t_від*f_п/6 = 1.53414
R_T.пс := 40
P_0.VT := (T_п.max - T_окр.max)/R_T.пс = 2.5
P_0.VT := (T_п.max - 40)/R_T.пс = 2.75
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Q_g := 2*10^-8
R_17 := t_вим/C_GS = 294.118
8.745*10^-8
Q_g*f_п = 0.00016
Q_c10 := Q_g + 5*10^-9 + (100*10^-9 + 50*10^-6 + 50*10^-6 + 0.5*10^-3 + 0 + 10*10^-6)*γ_max/f_п = 8.74543e-8
C_10 := Q_c10/1.3 = 6.72726e-8
R_16 := 5.88*10^-8/C_10 = 0.874056
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U_дс.пор := 0.8*5*0.1 = 0.4
R11 := 100*10^3*3/U_дс.пор = 750000
10/(8*10^3) = 0.00125
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R13 := (1.25*10^-3)/(0.1*10^-6) = 12500
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10*(1/0.045 - 1) = 212.222  # R1
10*(1/0.029 - 1) = 334.828  # R3
4.096/(1.3*70) = 0.045011  # Кдн
4.096/(1.3*109.019) = 0.0289011
1730/(1/0.105 + 1) = 164.389  # R2
2120/(1/0.105 + 1) = 201.448  # R4
10*(212.2 + 10)/(f_п*212.2*10) = 0.000130891  # C1
10*(334.8 + 10)/(f_п*334.8*10) = 0.000128734  # C2
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20*10^6/(4*6*10^3*4) - 1 = 207.333
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164.389/(212.222 + 164.389) = 0.436495  # Кдн1
Ксч := 99.108
0.436*200*2.4*99.108 = 20741.3  # Кε
U_вых.max/I_н.min = 350  # Rн
0.05*350 = 17.5  # Rсч
17.5/(2.074*10^4 + 1) = 0.000843739  # Rвих
1 + 2.074132224*10^4 = 20742.3  # Кст
21.76 + 1.391 + 1*2 = 25.151  # Рсч
0.05*γ_max*2*5 + 0.3 = 0.70947  # Рсу
50*2/(50*2 + 25.151 + 0.709) = 0.794534  # η
T_сч := sqrt(L*C_ф) = 0.00242384  # Тсч
R_н := U_вых.max/I_н.min = 350
Z := sqrt(L/C_ф)/(2*R_н) = 0.010351  # ζ
W_сч := 99.108*1/(T_сч^2 + 2*Z*T_сч + 1)*e^(1.25*10^-4) = 99.1148  # Wсч
T_сч^2 = 5.87501e-6
2*Z*T_сч = 5.01783e-5
Wp := 2*(T_сч^2 + 2*Z*T_сч + 1)/(3*2*10^-5*43.498) = 766.362
Кпр := 4*Z*T_сч/(3*T_п*U_вх) = 0.00270025
Кдиф := 2*T_сч^2/(3*T_п*U_вх) = 0.000316153
Кінт := 2/(3*T_п*U_вх) = 53.8131
Wрс := W*Wp = 766.362 W
T_180 := 12.95*10^-3
K_180 := 4.1*10^-3
K_пр := 0.6*K_180 = 0.00246
K_інт := 1.2*K_180/T_180 = 0.379923
K_диф := 0.075*K_180*T_180 = 3.98212e-6
Р_сч := 21.76 + 1.39 + 0.02*50*2 = 25.15
Р_су := 0.05*0.819*2*5 + 0.3 = 0.7095
50*2/(50*2 + 25.15 + 0.71) = 0.794534
P_vd2 := 2*U_пр*(1 - 0.197) + U_вх.max*2*36*10^-9*f_п/6 = 1.53617
k := 1 .. 150
ω[k] := 10^(k/20)
Re[k] := -(2*sin(1.25*10^-4*ω[k])/(3*1.25*10^-4*ω[k]))
Im[k] := -(2*cos(1.25*10^-4*ω[k])/(3*1.25*10^-4*ω[k]))
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P_VT1 := 5.1*10^-10*12^2/(2*3*10^-8) = 1.224
P_VD2 := 2*0.95*(1 - 0.197) + U_вх.max*I_L.ср*3*10^-8*f_п/6 = 1.53442
Р_сч := 1.224 + 1.53442153635 + 0.02*50*2 = 4.75842
Р_су := 0.05*0.819*2*5 + 0.3 = 0.7095
50*2/(50*2 + 4.758 + 0.71) = 0.948155
