# 7 ВАРІАНТ
ε_Σ := 0.15
β1_max := 20
β2_max := 8
β3_max := 11
σ_max := 30
T_max := 0.7
MвНаМн := 0.7
i := 650
МИ - 52
P_Н := 7
n_Н := 2500
U_Н := 220
I_Н := 37
R_Я := 0.088
η_Д := 84
ММ := 0.6
J_ДВ := 0.15
ЕМП - 100А3
P_ПН := 8500
n := 2850
U_ПН := 230
I_ЯЕМУ := 37
R := 0.38
μ_xx := 14
τ_a := 0.007
τ_кз := 0.73
ζ_a := 0.5
777777777777777777777777777777777777777777777777777777777777777777777777777777777777777777
R_ДЭму := 0.25*U_Н/I_ЯЕМУ = 1.48649
R_Д := R_ДЭму + R_Я = 1.57449
k_Ω := (U_Н - I_Н*R_Я)/(n_Н/60*2*π) = 0.827901
J_Н := 0.6*J_ДВ
J := J_ДВ + J_Н = 0.24
τ_p := J*R_Д/k_Ω^2 = 0.551307
W_НЧ^-1 := p*(τ_p*τ_кз*p^2 + τ_p*p + 1)*(τ_a^2*p^2 + 2*ξ_a*τ_a*p + 1)  # error: This variable is undefined.
τ_дв := sqrt(τ_кз*τ_p) = 0.634393
ξ_дв := τ_p/(2*τ_дв) = 0.434515
ω_дв := 1/τ_дв = 1.57631
ω_а := 1/τ_a = 142.857
888888888888888888888888888888888888888888888888888888888888888888888888888888888888888888
ω_p := β3_max/β2_max = 1.375
β_max := β2_max^3/β3_max^2 = 4.2314
β1_0 := β1_max - β_max*ω_p = 14.1818
ε_г := 0.5*ε_Σ = 0.075
L := 20*log(ε_г/β_max) = -35.0285
ω := ω_p = 1.375
# II ТИП НО У МЕНЯ ПО ТОКУ СООТВ. ІІІ тип
ε_0 := 0.1
ω3_n := nthroot(β3_max/ε_0, 3) = 4.79142
ω_1 := 1/1.819 = 0.549753
ω_2 := 1/20.892 = 0.0478652
ω_3 := 1/26.302 = 0.0380199
999999999999999999999999999999999999999999999999999999999999999999999999999999999999999999999
H := 87 - 18 = 69
69/20 = 3.45
10^3.45 = 2818.38
k_1 := 2818
I_КЗ := U_Н/R_Я = 2500
Ω_Н := n_Н*2*π/60 = 261.799
ε_м := 1/k_1*MвНаМн*I_Н/I_КЗ*Ω_Н/i = 1.48072e-6
ε_ск := β1_0/k_1 = 0.00503258
ε_.Σ := ε_ск + ε_г + ε_м = 0.0800341
ε_.Σ = 0.0800341
ε_Σ = 0.15
μ := 20
μτ := ω_1
τ := ω_1/μ = 0.0274876
П(p) := 1/μ*(1 + μτ*p)/(1 + τ*p)
k := k_1/μ = 140.9
ω_дв := 1/sqrt(τ_кз*τ_p) = 1.57631
ω_а := 1/τ_a = 142.857
ω_1 := 1/ω_1 = 1.819
ω_τ := 1/τ = 36.38
ε_м := 1/k*MвНаМн*I_Н/I_КЗ*Ω_Н/i = 2.96145e-5
ε_ск := β1_0/k = 0.100652
ε_.Σ := ε_ск + ε_г + ε_м = 0.175681
ε_.Σ = 0.175681
ε_Σ = 0.15
0.1 ≤ 0.1
k_кр := β1_0*MвНаМн*I_Н/I_КЗ*Ω_Н/i/(0.5*ε_Σ) = 0.789016
ω_0 := 0.6
T_0 := 1/ω_0 = 1.66667
# 10 10 10 10 10 10 10 10 10 10 10 10 10 10 10 10 10 10 10 10 10 10 10 10
k := 1/μ
T_1 := μτ
C_1 := 0.000001
R_1 := μτ/C_1 = 549753
R_2 := τ*R_1/(R_1*C_1 - τ) = 28934.3
20*log(0.000001) = -120
k := R_2/(R_1 + R_2) = 0.05
T_2 := R_2/(R_1 + R_2) = 0.05
T_1 := R_1*C_1 = 0.549753
τ := k*T_1 = 0.0274876
c := 0.00667
v := 140*c/(μτ*T_1) = 3.08972
T_2 = 0.05
r := T_2*v = 0.154486
C_2 := 0.000001
C_3 := 0.000001
R_4 := T_1/C_3 = 549753
R_3 := τ/C_3 = 27487.6
T_1 := R_4*C_3
τ := R_3*C_2
# 11 11 11 11 11 11 11 11 11 11 11 11 11 11 11 11 11 11 11 11 11 11 11 11 11 11 11 11 11 11
τ_кз = 0.73
ζ_ДВ := τ_p/(2*τ_дв) = 0.434515
τ_p = 0.551307
ϕ := 90 + atan(2*ζ_ДВ*τ_дв*ω_3/(1 - τ_дв^2*ω_3^2)) + atan(2*τ_a*ω_3*ζ_a/(1 - τ_a^2*ω_3^2)) - atan(T_1*ω_3) + atan(τ*ω_3) - 270 - atan(T_2*ω_3) + 2*atan(T_1*ω_3) = -179.959
ϕ_вк := 180 - ϕ = 359.959
359.958 > 30
90 + 1.20303454 + 0.0152464066 - 1.20303454 + 0.0598740678 - 270 - 0.0598740678 + 2.40606908 = -177.579
# 12 12 12 12 12 12 12 12 12 12 12 12 12 12 12 12 12 12 12 12 12 12 12 12 12 12 12 12
W_СК := p(T_0*p + 1)^2*(T_2*p + 1)*(T_3*p + 1)*(τ_a^2*p^2 + 2*ξ_a*τ_a*p + 1)/k(T_1*p + 1)^2 explicit, ALL → p(1.66666666667*p + 1)^2*(0.05*p + 1)*(T_3*p + 1)*(0.007^2*p^2 + 2*ξ_a*0.007*p + 1)/real(549752.611325*0.000001*p + 1)^2 = mc_p(1.66667*mc_p + 1)^2*(0.05*mc_p + 1)*(mc_T_2E_3*mc_p + 1)*(0.007^2*mc_p^2 + 2*mc_ξ_2E_a*0.007*mc_p + 1)/real(549753*0.000001*mc_p + 1)^2  # error: This variable is undefined.
t_p := □  # error: This placeholder is empty.
