# Координати вектора відносно рухомої системи координат:
P_uvw := transpose([3, 10, 5])
# Кути поворотів:
α := 15*π/180
ϕ := 40*π/180
θ := 55*π/180
# Послідовність поворотів: тета навколо Z, фі навколо V, альфа навколо X,
# Матриці елементарних поворотів:
R_x(α) := [1, 0, 0; 0, cos(α), -sin(α); 0, sin(α), cos(α)]
R_v(ϕ) := [cos(ϕ), 0, sin(ϕ); 0, 1, 0; -sin(ϕ), 0, cos(ϕ)]
R_z(θ) := [cos(θ), -sin(θ), 0; sin(θ), cos(θ), 0; 0, 0, 1]
# Матриця результуючого повороту:
R := R_x(α)*R_z(θ)*R_v(ϕ)
R = [0.439385, -0.819152, 0.368688; 0.772491, 0.554032, 0.310332; -0.458474, 0.148453, 0.876221]
# Координати вектора Р відносно абсолютної системи координат:
P_xyz := R*P_uvw
transpose(P_xyz) = [-5.02993, 9.40946, 4.49021]
