# Довжини ланок:
L := transpose([0, 1, 3, 3])
# Параметри, що характеризують конфігурацію маніпулятора:
a := transpose([0, 0, L[2], L[3]])
α := transpose([0, π/2, 0, 0])
d := transpose([0, L[1], 0, 0])
# Номер варіанта:
N := 7
# Поточні значення кутів повороту ланок:
θ := transpose([0, N*π/180, 2*N*π/180, -3*N*π/180])
# Визначаємо матриці перетворення для систем координат сміжних ланок:
n := 3
i := 1 .. n
A[i] := [
    cos(θ[i]), -(cos(α[i])*sin(θ[i])), sin(α[i])*sin(θ[i]), a[i]*cos(θ[i]);
    sin(θ[i]), cos(α[i])*cos(θ[i]), -(sin(α[i])*cos(θ[i])), a[i]*sin(θ[i]);
    0, sin(α[i]), cos(α[i]), d[i];
    0, 0, 0, 1
]
# Перемножуємо матриці перетворення для систем координат сміжних ланок і отримуємо матрицю маніпулятора:
T := product(A[i], i = 1 .. n)
T := [0.995, 0.07, 0.07, 5.949; 0.07, 4.866*10^-3, -0.998, 0.416; -0.07, 0.998, 0, 1.208; 0, 0, 0, 1]
# Перевірка:
x := cos(θ[1])*(L[2]*cos(θ[2]) + L[3]*cos(θ[2] + θ[3]))
y := sin(θ[1])*(L[2]*cos(θ[2]) + L[3]*cos(θ[2] + θ[3]))
z := L[1] + L[2]*sin(θ[2]) + L[3]*sin(θ[2] + θ[3])
x = 5.84463
y = 0.717631
z = 1.36016
