# Номер студента за списком:
N := 7
# Потрібні координати схвату:
x_r := 0.4 + 0.03*N
x_r = 0.61
y_r := 0.3 + 0.04*N
y_r = 0.58
z_r := 0.8 + 0.05*N
z_r = 1.15
# Довжини ланок маніпулятора:
L[1] := 1
L[2] := 1.3
L[3] := 1.2
# Конфігурація маніпулятора:
x(θ) := cos(θ[1])*(L[2]*cos(θ[2]) + L[3]*cos(θ[2] + θ[3]))
y(θ) := sin(θ[1])*(L[2]*cos(θ[2]) + L[3]*cos(θ[2] + θ[3]))
z(θ) := L[1] + L[2]*sin(θ[2]) + L[3]*sin(θ[2] + θ[3])
# Припустимі помилки позиціювання схвату:
ε_x := 0.001
ε_y := 0.001
ε_z := 0.001
# Задаємо ітераційні коефіцієнти:
γ[1] := 1
γ[2] := 1
γ[3] := 1
# Складаємо обчислювальну програму за методом градієнтного спуску:
θ :=
    θ1 ← π/6
    θ2 ← π/6
    θ3 ← -π/4
    for i ∈ 1 .. 10^4
        x ← cos(θ1)*(L[2]*cos(θ2) + L[3]*cos(θ2 + θ3))
        y ← sin(θ1)*(L[2]*cos(θ2) + L[3]*cos(θ2 + θ3))
        z ← L[1] + L[2]*sin(θ2) + L[3]*sin(θ2 + θ3)
        if (|x_r - x| < ε_x) and (|y_r - y| < ε_y) and (|z_r - z| < ε_z)
            {
                break
            }
        dx1 ← -sin(θ1)*(L[2]*cos(θ2) + L[3]*cos(θ2 + θ3))
        dx2 ← -cos(θ1)*(L[2]*sin(θ2) + L[3]*sin(θ2 + θ3))
        dx3 ← -L[3]*cos(θ1)*sin(θ2 + θ3)
        dy1 ← cos(θ1)*(L[2]*cos(θ2) + L[3]*cos(θ2 + θ3))
        dy2 ← -sin(θ1)*(L[2]*sin(θ2) + L[3]*sin(θ2 + θ3))
        dy3 ← -L[3]*sin(θ1)*sin(θ2 + θ3)
        dz1 ← 0
        dz2 ← L[2]*cos(θ2) + L[3]*cos(θ2 + θ3)
        dz3 ← L[3]*cos(θ2 + θ3)
        θ1 ← θ1 + γ[1]*((x_r - x)*dx1 + (y_r - y)*dy1 + (z_r - z)*dz1)
        θ2 ← θ2 + γ[2]*((x_r - x)*dx2 + (y_r - y)*dy2 + (z_r - z)*dz2)
        θ3 ← θ3 + γ[3]*((x_r - x)*dx3 + (y_r - y)*dy3 + (z_r - z)*dz3)
    θ[0] ← i
    θ[1] ← θ1
    θ[2] ← θ2
    θ[3] ← θ3
    θ
θ = [10; 0.760194; 1.28975; -2.44851]
# Розв'язання прямої задачі кінематики:
x := cos(θ[1])*(L[2]*cos(θ[2]) + L[3]*cos(θ[2] + θ[3]))
x = 0.609579
x_r = 0.61
y := sin(θ[1])*(L[2]*cos(θ[2]) + L[3]*cos(θ[2] + θ[3]))
y = 0.579601
y_r = 0.58
z := L[1] + L[2]*sin(θ[2]) + L[3]*sin(θ[2] + θ[3])
z = 1.14943
z_r = 1.15
# Помилки:
|x_r - x| = 0.000420817
|y_r - y| = 0.000399291
|z_r - z| = 0.000572826
