# Номер студента за списком:
N := 7
# Координати контрольних точок траекторії схвату:
xr := transpose([0.01*N, 0.01*N, 1.2, 1.2])
transpose(xr) = [0.07, 0.07, 1.2, 1.2]
yr := transpose([1, 1, 1.1, 1.1])
zr := transpose([0, 0.3, 1.3, 1])
# Моменти часу проходження контрольних точок:
T := transpose([0, 2, 12, 15])
# Довжини ланок маніпулятора:
L[1] := 1
L[2] := 1.3
L[3] := 1.2
# Конфігурація маніпулятора:
x(θ) := cos(θ[1])*(L[2]*cos(θ[2]) + L[3]*cos(θ[2] + θ[3]))
y(θ) := sin(θ[1])*(L[2]*cos(θ[2]) + L[3]*cos(θ[2] + θ[3]))
z(θ) := L[1] + L[2]*sin(θ[2]) + L[3]*sin(θ[2] + θ[3])
# Припустимі помилки позиціювання схвату:
εx := 0.05
εy := 0.05
εz := 0.05
# Задаємо ітераційні коефіцієнти:
γ1 := 0.1
γ2 := 0.1
γ3 := 0.1
# Складаємо обчислювальну програму за методом градієнтного спуску:
q :=
    for j ∈ 0 .. 3
        θ1 ← π/6
        θ2 ← π/6
        θ3 ← -π/4
        for i ∈ 1 .. 10^4
            x ← cos(θ1)*(L[2]*cos(θ2) + L[3]*cos(θ2 + θ3))
            y ← sin(θ1)*(L[2]*cos(θ2) + L[3]*cos(θ2 + θ3))
            z ← L[1] + L[2]*sin(θ2) + L[3]*sin(θ2 + θ3)
            if (|xr[j] - x| < εx) and (|yr[j] - y| < εy) and (|zr[j] - z| < εz)
                {
                    break
                }
            dx1 ← -sin(θ1)*(L[2]*cos(θ2) + L[3]*cos(θ2 + θ3))
            dx2 ← -cos(L[2]*sin(θ2) + L[3]*sin(θ2 + θ3))
            dx3 ← -L[3]*cos(θ1)*sin(θ2 + θ3)
            dy1 ← cos(θ1)*(L[2]*cos(θ2) + L[3]*cos(θ2 + θ3))
            dy2 ← -sin(θ1)*(L[2]*sin(θ2) + L[3]*sin(θ2 + θ3))
            dy3 ← -L[3]*sin(θ1)*sin(θ2 + θ3)
            dz1 ← 0
            dz2 ← L[2]*cos(θ2) + L[3]*cos(θ2 + θ3)
            dz3 ← L[3]*cos(θ2 + θ3)
            θ1 ← θ1 + γ1*((xr[j] - x)*dx1 + (yr[j] - y)*dy1 + (zr[j] - z)*dz1)
            θ2 ← θ2 + γ2*((xr[j] - x)*dx2 + (yr[j] - y)*dy2 + (zr[j] - z)*dz2)
            θ3 ← θ3 + γ3*((xr[j] - x)*dx3 + (yr[j] - y)*dy3 + (zr[j] - z)*dz3)
        θ[0, j] ← i
        θ[1, j] ← θ1
        θ[2, j] ← θ2
        θ[3, j] ← θ3
    θ
q = [
    22, 22, 37, 31;
    1.45425, 1.4638, 0.741947, 0.741945;
    0.151455, 0.386919, 0.955, 0.792023;
    -1.94196, -2.08308, -1.62501, -1.654
]
# Проміжки часу:
j := 0 .. rows(T) - 2
Δt[j + 1] := T[j + 1] - T[j]
n := rows(q) - 1
i := 1 .. n
a12[i] := 0
a11[i] := 0
a10[i] := q[i, 0]
a20[i] := q[i, 1]
a30[i] := q[i, 2]
# Матриця коефіцієнтів системи рівнянь:
C := [
    Δt[1]^4, Δt[1]^3, 0, 0, 0, 0, 0, 0, 0;
    4*Δt[1]^3, 3*Δt[1]^2, 0, 0, -1, 0, 0, 0, 0;
    12*Δt[1]^2, 6*Δt[1], 0, -2, 0, 0, 0, 0, 0;
    0, 0, Δt[2]^3, Δt[2]^2, Δt[2], 0, 0, 0, 0;
    0, 0, 3*Δt[2]^2, 2*Δt[2], 1, 0, 0, 0, -1;
    0, 0, 6*Δt[2], 2, 0, 0, 0, -2, 0;
    0, 0, 0, 0, 0, Δt[3]^4, Δt[3]^3, Δt[3]^2, Δt[3];
    0, 0, 0, 0, 0, 4*Δt[3]^3, 3*Δt[3]^2, 2*Δt[3], 1;
    0, 0, 0, 0, 0, 12*Δt[3]^2, 6*Δt[3], 2, 0
]
# Матриця правих частин сиситеми рівнянь:
B[i] := transpose([(q[i, 1] - q[i, 0]), 0, 0, (q[i, 2] - q[i, 1]), 0, 0, (q[i, 3] - q[i, 2]), 0, 0])
# Розв'язання системи рівнянь матричним методом:
A[i] := C^-1*B[i]
# Коефіцієнти сплайн-функцій:
a14[i] := A[i][0]
a13[i] := A[i][1]
a23[i] := A[i][2]
a22[i] := A[i][3]
a21[i] := A[i][4]
a34[i] := A[i][5]
a33[i] := A[i][6]
a32[i] := A[i][7]
a31[i] := A[i][8]
# Сплайн-функції:
θ(t) :=
    for i ∈ 1 .. n
        X[i] ← a14[i]*(t - T[0])^4 + a13[i]*(t - T[0])^3 + a12[i]*(t - T[0])^2 + a11[i]*(t - T[0]) + a10[i] if T[0] ≤ t < T[1]
        X[i] ← a23[i]*(t - T[1])^3 + a22[i]*(t - T[1])^2 + a21[i]*(t - T[1]) + a20[i] if T[1] ≤ t < T[2]
        X[i] ← a34[i]*(t - T[2])^4 + a33[i]*(t - T[2])^3 + a32[i]*(t - T[2])^2 + a31[i]*(t - T[2]) + a30[i] if T[2] ≤ t < T[3]
    X
# Розв'язання прямої задачі кінематики:
x(t) := cos(θ(t)[1])*(L[2]*cos(θ(t)[2]) + L[3]*cos(θ(t)[2] + θ(t)[3]))
y(t) := sin(θ(t)[1])*(L[2]*cos(θ(t)[2]) + L[3]*cos(θ(t)[2] + θ(t)[3]))
z(t) := L[1] + L[2]*sin(θ(t)[2]) + L[3]*sin(θ(t)[2] + θ(t)[3])
t := T[0], T[0] + 0.1 .. T[3]
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transpose(xr) = [0.07, 0.07, 1.2, 1.2]
transpose(yr) = [1, 1, 1.1, 1.1]
transpose(zr) = [0, 0.3, 1.3, 1]
# Траєкторія руху схвату в трьох проекціях:
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