# Початкові дані:
# Маси ланок маніпулятора, кг:
m_1 := 550
m_2 := 400
m_3 := 300
# Маса об'єкта, кг:
m_ob := 200
# Довжини ланок, м:
L_1 := 0.8
L_2 := 1.28
L_3 := 1.42
# Радіус першої ланки, м:
r_1 := 0.25
# Граничні значення кутів повороту ланок, град:
θ_1_min := -180
θ_2_min := -45
θ_3_min := -150
θ_1_max := 180
θ_2_max := 90
θ_3_max := 0
# Статичні координати основи маніпулятора, м:
x_st := 5
y_st := 2
z_st := 0.5
# Закони, за якими змінюються в часі кути рискання, диференту і крену судна:
ω_φ := 0.06
ω_ψ := 0.1
ω_θ := 0.45
φ_0_max := 1.5*π/180
ψ_0_max := 2*π/180
θ_0_max := 5*π/180
φ_0(t) := φ_0_max*sin(ω_φ*t)
ψ_0(t) := ψ_0_max*sin(ω_ψ*t)
θ_0(t) := θ_0_max*sin(ω_θ*t)
# Поступальні переміщення судна, м:
x_transl := 0
y_transl := 0
z_transl(t) := -0.1*cos(ω_ψ*t)
# Поступальні рухи об'єкта відносно абслютної системи координат, м:
x_ob_abs := x_st
y_ob_abs := 3.0
z_ob_abs(t) := 0.5 - 0.3*cos(ω_ψ*t)
# Моменти часу проходження контрольних точок траекторії, с:
# Початкова точка:
t0 := 0
x_r[0] := 1.5
y_r[0] := -1
z_r[0] := 1
# Точка уходу:
t1 := 2
x_r[1] := 1.5
y_r[1] := -1
z_r[1] := 1.5
# Точка підходу:
t2 := 4.7
Δz_t23 := 0.5
# Кінцева точка:
t3 := 6.4
# Припустимі помилки позиціювання схвату, м:
Δx_max := 0.001
Δy_max := 0.001
Δz_max := 0.001
# Максимальне перерегулювання, %:
σ_max < 5
# Координати обєкта відносно центру судна
x_ob_sh := x_ob_abs - x_transl
y_ob_sh := y_ob_abs - y_transl
z_ob_sh(t) := z_ob_abs(t) - z_transl(t)
# Закони зміни координат обєкта відносно основи маніпулятора
x_ob(t) := (x_ob_sh*cos(φ_0(t))*cos(ψ_0(t)) + y_ob_sh*sin(φ_0(t))*cos(ψ_0(t))) - z_ob_sh(t)*sin(ψ_0(t)) - x_st
y_ob(t) := (x_ob_sh*(cos(φ_0(t))*sin(ψ_0(t))*sin(θ_0(t)) - sin(φ_0(t))*cos(θ_0(t))) + y_ob_sh*(sin(φ_0(t))*sin(ψ_0(t))*sin(θ_0(t)) + cos(φ_0(t))*cos(θ_0(t))) + z_ob_sh(t)*cos(ψ_0(t))*sin(θ_0(t)) - y_st)
z_ob(t) := (x_ob_sh*(cos(φ_0(t))*sin(ψ_0(t))*cos(θ_0(t)) + sin(φ_0(t))*sin(θ_0(t))) + y_ob_sh*(sin(φ_0(t))*sin(ψ_0(t))*cos(θ_0(t)) - cos(φ_0(t))*sin(θ_0(t))) + z_ob_sh(t)*cos(ψ_0(t))*cos(θ_0(t)) - z_st)
# Складові швидкості руху обєкта відносно основи маніпулятора
v_ob_x(t) := d/dt(x_ob(t))
v_ob_y(t) := d/dt(y_ob(t))
v_ob_z(t) := d/dt(z_ob(t))
# Координати точки підходу, м
x_r[2] := x_ob(t2)
x_r[2] = 0.0160102
y_r[2] := y_ob(t2)
y_r[2] = 0.985152
z_r[2] := z_ob(t2) + Δz_t23
z_r[2] = 0.178864
# Координати кінцевої точки траєкторії схвату, м
x_r[3] := x_ob(t3)
x_r[3] = 0.0210115
y_r[3] := y_ob(t3)
y_r[3] = 0.960093
z_r[3] := z_ob(t3)
z_r[3] = -0.122366
# Швидкість схвату в кінцевій точці
v_x_t3 := v_ob_x(t3)
v_x_t3 = 0.0028036
v_y_t3 := v_ob_y(t3)
v_y_t3 = -0.021059
v_z_t3 := v_ob_z(t3)
v_z_t3 = 0.138536
# Припустимі помилки, м
ε_x := 0.0001
ε_y := 0.0001
ε_z := 0.0001
# Ітераційні коефіцієнти
γ_1 := 0.1
γ_2 := 0.1
γ_3 := 0.1
q :=
    for j ∈ 0 .. 3
        θ1 ← π/6
        θ2 ← π/6
        θ3 ← -π/4
        for i ∈ 1 .. 10000
            x ← cos(θ1)*(L_2*cos(θ2) + L_3*cos(θ2 + θ3))
            y ← sin(θ1)*(L_2*cos(θ2) + L_3*cos(θ2 + θ3))
            z ← L_1 + L_2*sin(θ2) + L_3*sin(θ2 + θ3)
            break if (|x_r[j] - x| < ε_x) and (|y_r[j] - y| < ε_y) and (|z_r[j] - z| < ε_z)
            dx1 ← -sin(θ1)*(L_2*cos(θ2) + L_3*cos(θ2 + θ3))
            dx2 ← -cos(θ1)*(L_2*sin(θ2) + L_3*sin(θ2 + θ3))
            dx3 ← -L_3*cos(θ1)*sin(θ2 + θ3)
            dy1 ← cos(θ1)*(L_2*cos(θ2) + L_3*cos(θ2 + θ3))
            dy2 ← -sin(θ1)*(L_2*sin(θ2) + L_3*cos(θ2 + θ3))
            dy3 ← -L_3*sin(θ1)*sin(θ2 + θ3)
            dz1 ← 0
            dz2 ← L_2*cos(θ2) + L_3*cos(θ2 + θ3)
            dz3 ← L_3*cos(θ2 + θ3)
            θ1 ← θ1 + γ_1*((x_r[j] - x)*dx1 + (y_r[j] - y)*dy1 + (z_r[j] - z)*dz1)
            θ2 ← θ2 + γ_2*((x_r[j] - x)*dx2 + (y_r[j] - y)*dy2 + (z_r[j] - z)*dz2)
            θ3 ← θ3 + γ_3*((x_r[j] - x)*dx3 + (y_r[j] - y)*dy3 + (z_r[j] - z)*dz3)
        θ[0, j] ← i
        θ[1, j] ← θ1
        θ[2, j] ← θ2
        θ[3, j] ← θ3
    θ
# Число ітерацій
# Кути повороту першої ланки
q = [
    90, 104, 81, 88;
    -0.588003, -0.588003, 1.55445, 1.54882;
    1.00336, 1.19458, 0.673871, 0.383929;
    -1.6712, -1.54722, -2.25515, -2.11491
]  # Кути повороту другої ланки
# Кути повороту третьої ланки
# Визначення кутових швидкостей ланок маніпулятора в точці захвату обєкта
i := 1 .. rows(q) - 1
θ[i] := q[i, 3]
C[0, 0] := -sin(θ[1])*(L_2*cos(θ[2]) + L_3*cos(θ[2] + θ[3]))
C[1, 2] := -L_3*sin(θ[1])*sin(θ[2] + θ[3])
C[0, 1] := -cos(θ[1])*(L_2*sin(θ[2]) + L_3*sin(θ[2] + θ[3]))
C[2, 0] := 0
C[0, 2] := -L_3*cos(θ[1])*sin(θ[2] + θ[3])
C[1, 0] := cos(θ[1])*(L_2*cos(θ[2]) + L_3*cos(θ[2] + θ[3]))
C[2, 1] := L_2*cos(θ[2]) + L_3*cos(θ[2] + θ[3])
C[1, 1] := -sin(θ[1])*(L_2*sin(θ[2]) + L_3*sin(θ[2] + θ[3]))
C[2, 2] := L_3*cos(θ[2] + θ[3])
v[0] := v_x_t3
v[1] := v_y_t3
v[2] := v_z_t3
ω_t3 := C^-1*v
transpose(ω_t3) = [-0.0034006, 0.121822, -0.0951321]
Δt_1 := t1 - t0
Δt_2 := t2 - t1
Δt_3 := t3 - t2
n := rows(q) - 1
i := 1 .. n
a12[i] := 0
a11[i] := 0
a10[i] := q[i, 0]
a20[i] := q[i, 1]
a30[i] := q[i, 2]
C := [
    Δt_1^4, Δt_1^3, 0, 0, 0, 0, 0, 0, 0;
    4*Δt_1^3, 3*Δt_1^2, 0, 0, -1, 0, 0, 0, 0;
    12*Δt_1^2, 6*Δt_1, 0, -2, 0, 0, 0, 0, 0;
    0, 0, Δt_2^3, Δt_2^2, Δt_2, 0, 0, 0, 0;
    0, 0, 3*Δt_2^2, 2*Δt_2, 1, 0, 0, 0, -1;
    0, 0, 6*Δt_2, 2, 0, 0, 0, -2, 0;
    0, 0, 0, 0, 0, Δt_3^4, Δt_3^3, Δt_3^2, Δt_3;
    0, 0, 0, 0, 0, 4*Δt_3^3, 3*Δt_3^2, 2*Δt_3, 1;
    0, 0, 0, 0, 0, 12*Δt_3^2, 6*Δt_3, 2, 0
]
F[i] := transpose([(q[i, 1] - q[i, 0]), 0, 0, (q[i, 2] - q[i, 1]), 0, 0, (q[i, 3] - q[i, 2]), ω_t3[i - 1], 0])
A[i] := C^-1*F[i]
a14[i] := A[i][0]
a13[i] := A[i][1]
a23[i] := A[i][2]
a22[i] := A[i][3]
a21[i] := A[i][4]
a34[i] := A[i][5]
a33[i] := A[i][6]
a32[i] := A[i][7]
a31[i] := A[i][8]
θ(t) :=
    for i ∈ 1 .. n
        X[i] ← a14[i]*(t - t0)^4 + a13[i]*(t - t0)^3 + a12[i]*(t - t0)^2 + a11[i]*(t - t0) + a10[i] if t ≥ t0 and t ≤ t1
        X[i] ← a23[i]*(t - t1)^3 + a22[i]*(t - t1)^2 + a21[i]*(t - t1) + a20[i] if t ≥ t1 and t < t2
        X[i] ← a34[i]*(t - t2)^4 + a33[i]*(t - t2)^3 + a32[i]*(t - t2)^2 + a31[i]*(t - t2) + a30[i] if t ≥ t2 and t ≤ t3
    X
t := t0, t0 + 0.1 .. t3
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x(t) := (L_2*cos(θ(t)[2]) + L_3*cos(θ(t)[2] + θ(t)[3]))*cos(θ(t)[1])
y(t) := (L_2*cos(θ(t)[2]) + L_3*cos(θ(t)[2] + θ(t)[3]))*sin(θ(t)[1])
z(t) := L_1 + L_2*sin(θ(t)[2]) + L_3*sin(θ(t)[2] + θ(t)[3])
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# Графіки зміни у часі координат схвату об'єкта
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# Траекторія схвату у 3 проекціях
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# Закон зміни кутових швидкостей:
ω(t) :=
    for i ∈ 1 .. n
        X[i] ← 4*a14[i]*(t - t0)^3 + 3*a13[i]*(t - t0)^2 + 2*a12[i]*(t - t0) + a11[i] if t ≥ t0 and t < t1
        X[i] ← 3*a23[i]*(t - t1)^2 + 2*a22[i]*(t - t1) + a21[i] if t ≥ t1 and t < t2
        X[i] ← 4*a34[i]*(t - t2)^3 + 3*a33[i]*(t - t2)^2 + 2*a32[i]*(t - t2) + a31[i] if t ≥ t2 and t ≤ t3
    X
# Визначення закону зміни кутових швидкостей ланок
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# Закон зміни кутових прискорень
ε(t) :=
    for i ∈ 1 .. n
        X[i] ← 12*a14[i]*(t - t0)^2 + 6*a13[i]*(t - t0) + 2*a12[i] if t ≥ t0 and t < t1
        X[i] ← 6*a23[i]*(t - t1) + 2*a22[i] if t ≥ t1 and t < t2
        X[i] ← 12*a34[i]*(t - t2)^2 + 6*a33[i]*(t - t2) + 2*a32[i] if t ≥ t2 and t ≤ t3
    X
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# Визначеня максимальних кутових швидкостей та прискорень:
Ω_max :=
    for i ∈ 1 .. n
        X[i, 1] ← 0
        N ← 1000
        for j ∈ 1 .. N
            t[j] ← j/N*t3
            if |ω(t[j])[i]| > X[i, 1]
                X[i, 0] ← t[j]
                X[i, 1] ← |ω(t[j])[i]|
    X
ε_max :=
    for i ∈ 1 .. n
        X[i] ← 0
        N ← 1000
        for j ∈ 1 .. N
            t[j] ← j/N*t3
            X[i] ← |ε(t[j])[i]| if |ε(t[j])[i]| > X[i]
    X
t_ω_max[i] := Ω_max[i, 0]
ω_max[i] := Ω_max[i, 1]
# Моменти часу, що відповідають максимальним швидкостям, с:
transpose(t_ω_max) = [0, 3.328, 4.7936, 3.2384]
# Максимальні кутові швидкості, рад/с:
transpose(ω_max) = [0, 1.02972, 0.432655, 0.400163]
# Максимальні кутові прискорення
transpose(ε_max) = [0, 1.06397, 0.517703, 0.64969]
# 2. РОЗРАХУНОК СИЛОВОЇ ЧАСТИНИ ЕЛЕКТРОПРИВОДІВ ПОВОРОТУ ЛАНОК
# 2.1 Визначення моментів навантаження
# Моменти інерції ланок відносно власних осей обертання
J_1 := 1/2*m_1*r_1^2
J_2 := 1/3*m_2*L_2^2
J_3 := 1/3*m_3*L_3^2
J_1 = 17.1875
J_2 = 218.453
J_3 = 201.64
# Максимальне прискорення кута крену судна
ε_θ_max := 10*π/180*ω_θ^2
ε_θ_max = 0.0353429
# Прискорення вільного падіння
g := 9.8
# Максимальні статичні моменти навантаження
M_st_max[1] := g*sin(θ_0_max)*(1/2*L_2*m_2 + (1/2*L_3 + L_2)*m_3 + (L_2 + L_3)*m_ob)
M_st_max[2] := g*(1/2*L_2*m_2 + (1/2*L_3 + L_2)*m_3 + (L_2 + L_3)*m_ob)
M_st_max[3] := g*(1/2*L_3*m_3 + L_3*m_ob)
transpose(M_st_max) = [0, 1189.8, 13651.4, 4870.6]
# Максимальні динамічні моменти навантаження
M_dyn_max[1] := ε_max[1]*(J_1 + J_2 + (L_2^2 + L_2*L_3)*m_3 + J_3 + (L_2 + L_3)^2*m_ob) + ε_θ_max*(z_st + L_1)*(1/2*L_2*m_2 + (1/2*L_3 + L_2)*m_3 + (L_2 + L_3)*m_ob)
M_dyn_max[2] := (ε_max[2] + ε_θ_max)*(J_2 + (L_2^2 + L_2*L_3)*m_3 + J_3 + (L_2 + L_3)^2*m_ob) + ε_max[3]*L_2*L_3*(1/2*m_3 + m_ob)
M_dyn_max[3] := (ε_max[3] + ε_max[2] + ε_θ_max)*(J_3 + L_3^2*m_ob)
transpose(M_dyn_max) = [0, 3183.66, 2025.38, 727.559]
# Максимальні моменти навантаження
M_max := M_st_max + M_dyn_max
transpose(M_max) = [0, 4373.46, 15676.8, 5598.16]
# Кути повороту ланок при максимальних швидкостях
θ(t_ω_max[1])*180/π = [0; 27.2652; 64.0306; -111.044]
θ(t_ω_max[2])*180/π = [0; 90.4126; 36.3; -128.656]
θ(t_ω_max[3])*180/π = [0; 21.9843; 65.0321; -108.993]
# Статичні моменти навантаження при максимальних швидкостях:
M_st_ω_max[1] := g*sin(θ_0_max)*((1/2*m_2 + m_3 + m_ob)*L_2*cos(θ(t_ω_max[1])[2]) + (1/2*m_3 + m_ob)*L_3*cos(θ(t_ω_max[1])[2] + θ(t_ω_max[1])[3]))
M_st_ω_max[2] := g*((1/2*m_2 + m_3 + m_ob)*L_2*cos(θ(t_ω_max[2])[2]) + (1/2*m_3 + m_ob)*L_3*cos(θ(t_ω_max[2])[2] + θ(t_ω_max[2])[3]))
M_st_ω_max[3] := |g*(1/2*m_3 + m_ob)*L_3*cos(θ(t_ω_max[2])[2] + θ(t_ω_max[2])[3])|
transpose(M_st_ω_max) = [0, 624.55, 6876.51, 200.179]
# 2.2 Вибір приводних двигунів
# Для першого електропривода обираємо двигун ДБМ 142-18-3
# Тривалий момент на валу
M_do[1] := 18
# Номінальний струм
I_do[1] := 13.4
# Номінальна частота обертання
n_n[1] := 3000
# Момент інерції ротора
J_m[1] := 46.78*10^-4
# Номінальна кутова швидкість
ω_n[1] := π*n_n[1]/30
ω_n[1] = 314.159
# Передавальне число редуктора
i_r[1] := ω_n[1]/ω_max[1]
i_r[1] = 305.092
# Задаємо ККД редуктора
η_r := 0.9
# Максимальний крутний момент, що потребується
M_req_max[1] := M_max[1]/(i_r[1]*η_r) + 1.1*J_m[1]*i_r[1]*ε_max[1]
M_req_max[1] = 17.598
# Виконується умова
M_do[1] > M_req_max[1]
M_do[1] = 18
# Обраний двигун забезпечує необхідний максимальний крутний момент
# Крутний момент, що потребується при максимальній швидкості обертання
M_req_ω_max[1] := M_st_ω_max[1]/(i_r[1]*η_r)
M_req_ω_max[1] = 2.27454
# Виконується умова
0.5*M_do[1] = 9
0.5*M_do[1] > M_req_ω_max[1]
# Обраний двигун забезпечує необхідний крутний момент при максимальній швидкості
# Для другого електропривода обираємо двигун ДБМ 192-36-3
# Тривалий момент на валу
M_do[2] := 36
# Номінальний струм
I_do[2] := 25
# Номінальна частота обертання
n_n[2] := 3000
# Момент інерції ротора
J_m[2] := 176.44*10^-4
# Номінальна кутова швидкість
ω_n[2] := π*n_n[2]/30
ω_n[2] = 314.159
# Передавальне число редуктора
i_r[2] := ω_n[2]/ω_max[2]
i_r[2] = 726.119
# Задаємо ККД редуктора
η_r := 0.9
# Максимальний крутний момент, що потребується
M_req_max[2] := M_max[2]/(i_r[2]*η_r) + 1.1*J_m[2]*i_r[2]*ε_max[2]
M_req_max[2] = 31.2846
# Виконується умова
M_do[2] > M_req_max[2]
M_do[2] = 36
# Обраний двигун забезпечує необхідний максимальний крутний момент
# Крутний момент, що потребується при максимальній швидкості обертання
M_req_ω_max[2] := M_st_ω_max[2]/(i_r[2]*η_r)
M_req_ω_max[2] = 10.5225
# Виконується умова
0.5*M_do[2] = 18
0.5*M_do[2] > M_req_ω_max[2]
# Обраний двигун забезпечує необхідний крутний момент при максимальній швидкості
# Для третього електропривода обираємо двигун ДБМ 142-11-3
# Тривалий момент на валу
M_do[3] := 11
# Номінальний струм
I_do[3] := 8.4
# Номінальна частота обертання
n_n[3] := 3000
# Момент інерції ротора
J_m[3] := 33.08*10^-4
# Номінальна кутова швидкість
ω_n[3] := π*n_n[3]/30
ω_n[3] = 314.159
# Передавальне число редуктора
i_r[3] := ω_n[3]/ω_max[3]
i_r[3] = 785.078
# Задаємо ККД редуктора
η_r := 0.9
# Максимальний крутний момент, що потребується
M_req_max[3] := M_max[3]/(i_r[3]*η_r) + 1.1*J_m[3]*i_r[3]*ε_max[3]
M_req_max[3] = 9.779
# Виконується умова
M_do[3] > M_req_max[3]
M_do[3] = 11
# Обраний двигун забезпечує необхідний максимальний крутний момент
# Крутний момент, що потребується при максимальній швидкості обертання
M_req_ω_max[3] := M_st_ω_max[3]/(i_r[3]*η_r)
M_req_ω_max[3] = 0.283311
# Виконується умова
0.5*M_do[3] = 5.5
0.5*M_do[3] > M_req_ω_max[3]
# Обраний двигун забезпечує необхідний крутний момент при максимальній швидкості
# 2.3 Розрахунок параметрів електроприводів повороту ланок
# Номінальні потужності двигунів:
P_n[i] := M_do[i]*ω_n[i]
transpose(P_n) = [0, 5654.87, 11309.7, 3455.75]
# Напруга живлення інвертора:
U_d := 515
# Активні опори обмоток якоря:
R[i] := U_d/I_do[i] - P_n[i]/I_do[i]^2
transpose(R) = [0, 6.93993, 2.50443, 12.3334]
# Постійні двигунів:
c[i] := M_do[i]/I_do[i]
transpose(c) = [0, 1.34328, 1.44, 1.30952]
# Коефіцієнти передачі двигунів за вхідною напругою
k_m[i] := 1/c[i]
transpose(k_m) = [0, 0.744444, 0.694444, 0.763636]
# Коефіціенти передачі двигунів за моментом:
k_t[i] := R[i]/c[i]^2
transpose(k_t) = [0, 3.84609, 1.20777, 7.19213]
# Частота мережі:
f_net := 50
# Індуктивність обмоток якоря:
L[i] := U_d/(I_do[i]*2*π*f_net)*0.25
transpose(L) = [0, 0.0305839, 0.016393, 0.0487886]
# Електромагнітні постійні часу
T_e[i] := L[i]/R[i]
transpose(T_e) = [0, 0.00440695, 0.00654559, 0.00395579]
# Мінімальні моменти інерції навантаження електроприводів
J_min[1] := J_1 + J_3*sin(θ_3_min)^2
J_min[2] := J_2 + (1/3*L_3^2 + L_2*L_3*cos(θ_3_min) + L_2^2)*m_3
J_min[3] := J_3
transpose(J_min) = [0, 120.235, 1292.9, 201.64]
# Максимальні моменти інерції навантаження електроприводів
J_max[1] := J_1 + J_2 + (L_2^2 + L_2*L_3)*m_3 + J_3 + (L_2 + L_3)^2*m_ob
J_max[2] := J_2 + (L_2^2 + L_2*L_3)*m_3 + J_3 + (L_2 + L_3)^2*m_ob
J_max[3] := J_3 + L_3^2*m_ob
transpose(J_max) = [0, 2932.08, 2914.89, 604.92]
# Мінімальні та максимальні значення електромеханічної постійної часу
T_min[i] := (1.1*J_m[i] + J_min[i]/i_r[i]^2)/c[i]^2*R[i]
transpose(T_min) = [0, 0.0247593, 0.0264025, 0.0285237]
T_max[i] := (1.1*J_m[i] + J_max[i]/i_r[i]^2)/c[i]^2*R[i]
transpose(T_max) = [0, 0.140944, 0.030118, 0.0332295]
# 3.3 Синтез бажаних передавальних функцій
# Припустимі помилки кутів повороту ланок, рад
δ_max[1] := min(Δx_max, Δy_max)/(L_2 + L_3)
δ_max[2] := min(Δx_max, Δy_max, Δz_max)/(L_2 + 2*L_3)
δ_max[3] := δ_max[2]
transpose(δ_max) = [0, 0.00037037, 0.000242718, 0.000242718]
# Максимальні значення збурного моменту
M_dist_max[i] := M_max[i] - J_max[i]*ε_max[i]
transpose(M_dist_max) = [0, 1253.8, 14167.7, 5205.15]
# Коефіцієнти підсилення розімкнених систем
k[i] := 1/δ_max[i]*(ω_max[i] + 1/(i_r[i]^2*η_r)*k_t[i]*M_dist_max[i])
transpose(k) = [0, 2935.66, 1931.11, 1926.72]
# Параметри синусоїдального сигналу
Θ_s[i] := ω_max[i]^2/ε_max[i]
transpose(Θ_s)*180/π = [0, 57.0991, 20.717, 14.1218]
ω_s[i] := ε_max[i]/ω_max[i]
transpose(ω_s) = [0, 1.03327, 1.19657, 1.62356]
# Спрягаючі частоти бажаних ЛАЧХ
ω_1[i] := ω_s[i]^2*Θ_s[i]/sqrt(k[i]^2*δ_max[i]^2 - ω_s[i]^2*Θ_s[i]^2)
transpose(ω_1) = [0, 3.04789, 2.87155, 2.68461]
α := 20
ω_2[i] := sqrt(k[i]*ω_1[i]/α)
transpose(ω_2) = [0, 21.1513, 16.6512, 16.0818]
ω_3 := 70*ω_2
transpose(ω_3) = [0, 1480.59, 1165.59, 1125.73]
ω_4 := 10*ω_3
transpose(ω_4) = [0, 14805.9, 11655.9, 11257.3]
ω_5 := 10*ω_4
transpose(ω_5) = [0, 148059, 116559, 112573]
# Постійні часу бажаних передавальних функцій, с:
T_1[i] := ω_1[i]^-1
T_2[i] := ω_2[i]^-1
T_3[i] := ω_3[i]^-1
T_4[i] := ω_4[i]^-1
T_5[i] := ω_5[i]^-1
T_1 = [0; 0.328096; 0.348244; 0.372493]
T_2 = [0; 0.0472784; 0.0600556; 0.062182]
T_3 = [0; 0.000675405; 0.000857938; 0.000888315]
T_5 = [0; 6.75405e-6; 8.57938e-6; 8.88315e-6]
T_4 = [0; 6.75405e-5; 8.57938e-5; 8.88315e-5]
# 3.4 Визначення неперервних передавальних функцій
# Коефіцієнти підсилення паралельних коригуючих пристроїв
k_p[i] := 1/k_m[i]*(T_e[i]*T_max[i]/(T_3[i]*T_4[i]) - 1)
transpose(k_p) = [0, 18289, 3855.35, 2180.1]
# Постійні часу паралельних коригуючих пристроїв
τ[i] := 1/(k_m[i]*k_p[i])*((T_3[i] + T_4[i])*(k_p[i]/c[i] + 1) - T_max[i])
transpose(τ) = [0, 0.000732648, 0.000932835, 0.000957773]
# Передавальні функції паралельних коригуючих пристроїв
W_p(p) :=
    for i ∈ 1 .. n
        W[i] ← k_p[i]*(τ[i]*p + 1)
    W
# Коефіцієнти підсилення послідовних коригуючих пристроїв
k_s[i] := c[i]*k[i]*i_r[i]*(k_m[i]*k_p[i] + 1)
transpose(k_s) = [0, 1.63817e10, 5.40804e9, 3.29966e9]
# Передавальні функції послідовних коригуючих пристроїв
W_s(p) :=
    for i ∈ 1 .. n
        W[i] ← k_s[i]*(T_2[i]*p + 1)/((T_1[i]*p + 1)*(T_5[i]*p + 1))
    W
# 3.5 Визначення дискретних передавальних фунцій коригуючих пристроїв
# Максимальні спрягаючі частоти
transpose(ω_5)/(2*π) = [0, 23564.4, 18550.9, 17916.5]
# Частота дискретизації
f_d := 3*10^5
# Період дискретизації
T := f_d^-1
T = 3.33333e-6
# Визначаємо дискретні передавальні функції цифрових коригуючих пристроїв методом відображення диференціалів.
# Передавальні функції паралельних цифрових коригуючих пристроїв:
W_p_d(z) :=
    for i ∈ 1 .. n
        W[i] ← k_p[i]*(τ[i]*(1 - z^-1)/T + 1)
    W
# Передавальні функції послідовних цифрових коригуючих пристроїв:
W_s_d(z) :=
    for i ∈ 1 .. n
        W[i] ← k_s[i]*T/((T_1[i] + T) - T_1[i]*z^-1)*(T_2[i]*(1 - z^-1)/T + 1)*T/((T_5[i] + T) - T_5[i]*z^-1)
    W
Перевірка:
z1 := 0.63
W_s((z1 - 1)/(T*z1)) = [0; -1.24229e10; -1.82281e9; -974623126]
W_s_d(z1) = [0; -1.24229e10; -1.82281e9; -974623126]
# 3.6 Розрахунок частотних характеристик і визначення запасів стійкості систем керування
j := sqrt(-1)
# Комплексні передавальні функції:
W(ω, T_m) :=
    for i ∈ 1 .. n
        W[i] ← e^(-j*ω*T)*W_s_d(e^(j*ω*T))[i]*k_m[i]/(T_e[i]*T_m[i]*(j*ω)^2 + T_m[i]*j*ω + 1)*1/(j*ω)/(1 + k_m[i]/(T_e[i]*T_m[i]*(j*ω)^2 + T_m[i]*j*ω + 1)*1/(j*ω)*(e^(-j*ω*T))*(1 - e^(-j*ω*T))/T*W_p_d(e^(j*ω*T))[i])*1/i_r[i]
    W
# ЛАЧХ та ЛФЧХ:
L(ω, T_m) :=
    for i ∈ 1 .. n
        L[i] ← 20*log(|W(ω, T_m)[i]|)
    L
φ(ω, T_m) :=
    for i ∈ 1 .. n
        φ[i] ← arg(W(ω, T_m)[i])
        φ[i] ← φ[i] - 2*π if φ[i] > -π/2
    φ
# Найменші та найбільші спрягаючі частоти
transpose(ω_1) = [0, 3.04789, 2.87155, 2.68461]
transpose(ω_5) = [0, 148059, 116559, 112573]
# Параметри осі частот:
# Початкова та кінцева частоти
ω_begin := 10^-1
ω_end := 10^5
# Число декад
N_dec := log(ω_end/ω_begin)
N_dec = 6
# Число точок
N_points := 10^3
# Крок за частотою
Δω_dec := N_dec/N_points
# Матриця значень частоти:
ω :=
    for i ∈ 0 .. N_points
        ω_dec ← i*Δω_dec
        ω[i] ← ω_begin*10^ω_dec
    ω
# Номер ланки:
i := 1
# Номер точок:
u := 0 .. rows(ω) - 1
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# Номер ланки:
i := 2
# Номер точок:
u := 0 .. rows(ω) - 1
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# Номер ланки:
i := 3
# Номер точок:
u := 0 .. rows(ω) - 1
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η_r = 0.9
k_m = [0; 0.744444; 0.694444; 0.763636]
k_t = [0; 3.84609; 1.20777; 7.19213]
T_e = [0; 0.00440695; 0.00654559; 0.00395579]
T_max = [0; 0.140944; 0.030118; 0.0332295]
i_r = [0; 305.092; 726.119; 785.078]
T = 3.33333e-6
k_p = [0; 18289; 3855.35; 2180.1]
τ = [0; 0.000732648; 0.000932835; 0.000957773]
k_s = [0; 1.63817e10; 5.40804e9; 3.29966e9]
T_1 = [0; 0.328096; 0.348244; 0.372493]
T_2 = [0; 0.0472784; 0.0600556; 0.062182]
T_5 = [0; 6.75405e-6; 8.57938e-6; 8.88315e-6]
M_dist_max = [0; 1253.8; 14167.7; 5205.15]
ω_max = [0; 1.02972; 0.432655; 0.400163]
Θ_s = [0; 0.996566; 0.36158; 0.246472]
ω_s = [0; 1.03327; 1.19657; 1.62356]
δ_max = [0; 0.00037037; 0.000242718; 0.000242718]
